####################################################
## RHEO wall-debug branch, 3/28/2022              ##
## Create initial conditions for poiseuille inlet ##
####################################################

dimension          2
units              lj
atom_style         rheo
boundary           p f p
comm_modify        vel yes
newton off

############################################
## Particle Lattice/Resolution Parameters ##
############################################

variable           L equal 10
variable           sf equal .2 #/${L} #scaling of unit cell
variable           nb equal 1    #number of basis atoms depends on lattice
variable           n equal ${nb}/(${sf}^2)
variable           del equal ${sf}#*sqrt(2)
variable           hd equal 3.5
variable           h3 equal ${hd}*${del}
variable           dz equal 0.1*${sf}

############################################
##              Create box                ##
############################################

### These lines are replaced by read_data in the second script ###
region             box block 0 20 -10 10 -${dz} ${dz} units box
create_box         2 box
lattice            sq ${n}

region             topwall block INF INF  7 10 -${dz} ${dz} units box
region             block   block INF INF -6.99 6.99 -${dz} ${dz} units box
region             botwall block INF INF -10 -7 -${dz} ${dz} units box

create_atoms       2 region topwall
create_atoms       2 region botwall
create_atoms       1 region block
### These lines are replaced by read_data in the second script ###


group              fluid type 1
group              rig type 2


#Now randomly displace in x and y up %20 of their spacing (sf)
variable           seed equal 135414
variable           dr equal 0.1*${del}
displace_atoms     fluid random ${dr} ${dr} 0 ${seed} units box

############################################
##         Potential parameters           ##
############################################

variable           rho0 equal 1.0
variable           mp equal ${rho0}/${n}
variable           cs equal 1
variable           zeta equal 1
variable           D equal 1.0
variable	       kappa equal ${D}*${rho0}/${mp}
variable           eta equal 0.1
#eta = 1 becomes fully developed faster than 0.1; gives better profile

variable           Dr equal 0.05*${h3}*${cs}
pair_style         rheo ${h3} artificial/visc ${zeta} rho/damp ${Dr}
pair_coeff         * * ${rho0} ${cs}

############################################
##         Particle Properties            ##
############################################

mass               1 ${mp}
mass               2 ${mp}
set                group all rho ${rho0}
set                group all phase 0
set                group rig phase 5
set                group all temp 1.0

#Apply some random velocity to 'melt' fluid
velocity           fluid create 0.001 253443

############################################
##         Integration and fixes          ##
############################################

fix                1 all rheo ${h3} CRK1 0 shift
fix                2 all rheo/viscosity constant ${eta}
fix                3 rig setforce 0.0 0.0 0.0

#CFL criterion
variable           dt_max equal  0.1*${h3}/${cs}/3
timestep           ${dt_max}

variable           skin equal 0.2*${h3}
neighbor           ${skin} bin
neigh_modify       one 5000

############################################
##            Output and run              ##
############################################

compute            den all property/atom rho
compute            phase all property/atom phase
compute            eta all property/atom viscosity

thermo             200
thermo_style       custom step time ke press
thermo_modify      norm no

run                10000

write_data         data_initial nofix
delete_atoms        group rig
write_data         data_inlet nofix
